*HEADING
 Microbending-thickness 12.5 microns-Cosserat solid
*NODE
    1, 0.00000, 0.00000
    2, 0.00500, 0.00000
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***********************************************************************
***********************************************************************
*USER ELEMENT,NODES=9,TYPE=U1,PROPERTIES=8,COORDINATES=2,VARIABLES=307
 1,2,6
***********************************************************************
*ELEMENT,TYPE=U1, ELSET=TODOS
    1,   1,   3, 105, 103,   2,  54, 104,  52,  53
    2,   3,   5, 107, 105,   4,  56, 106,  54,  55
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***************************************************
***************************************************
*ELSET,ELSET=RESULTS
101
*ELSET,ELSET=LEDGE
1,26,51,76,
101
*NSET,NSET=LEFT1
1,52,103,154,205,
256,307,358,409,460,
511
*NSET,NSET=LEFT2
256
*NSET, NSET=EDGE
561
*NSET,NSET=REDGE1
51,102,53,204,
255,306,357,408,
459,510,561
*NSET,NSET=REDGE2
306
***************************************************
***************************************************
***************************************************
**************MATERIAL PROPERTIES******************
***************************************************
*UEL PROPERTY,ELSET=TODOS
42.34E3,0.34,0.005,100.0,21.77,15.542,383.3,6227.4
***************************************************
***************************************************
****
***************************************************
******B O U N D A R Y  C O N D I T I O N S*********
***************************************************
** Name: BC-1 Type: Displacement/Rotation
*Boundary
LEFT1,1,1,0.0
LEFT2,2,2,0.0
LEFT2,6,6,0.0
***************************************************
*****A M P L I T U D E   D E F I N I T I O N*******
***************************************************
***
*AMPLITUDE,NAME=DIS
0.000, 0.000,1.0,1.0
***
***
**************STEP: Step-1*************************
***************************************************
**
*Step,INC=10000, EXTRAPOLATION=NO, name=Step-1
elastoplastic anaylisis
*Static,direct
0.05,1.0
*****
*******************************************
**************L O A D S********************
*******************************************
**ACTIVATE THIS LINE FOR DISP. CONTROLLED**
*******************************************
***
**BOUNDARY,AMPLITUDE=DIS
**EDGE,2,2,-0.060
**
*******************************************
**ACTIVATE THIS LINE FOR FORC. CONTROLLED**
*******************************************
*Cload,AMPLITUDE=DIS
EDGE,2,-0.025
**
*MONITOR, NODE=561,DOF=2
**
******************************************
******* OUTPUT REQUEST*********************
*******************************************
****
****
*ELPRINT, ELSET=RESULTS, FREQUENCY=1
SDV199,sdv200,sdv201,sdv202,sdv205,sdv206,sdv207,sdv208
*ELPRINT, ELSET=RESULTS, FREQUENCY=1
sdv306,sdv307
*End Step
