*Heading
 TEST SPHERICAL
** Job name: TEST_INDENT Model name: Model-1
** To be run with user subroutine UEL4_ECL_AXY.for
****
*Preprint, echo=NO, model=NO, history=NO, contact=NO
**
*Node
      1,           0.,           0.
      2,   0.03756798,           0.
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*****
*Nset, nset=POINT
500
*Nset, nset=POINTA
500,
*Nset, nset=_PickedSet8,generate
1,  21,   1
*Nset, nset=_PickedSet9,generate
   1,  421,   21
*NSET,NSET=SUPERFICIE,GENERATE
421,441,1
***********************************************************************
***********************************************************************
*USER ELEMENT,NODES=4,TYPE=U1,PROPERTIES=2,COORDINATES=2,VARIABLES=34
 1,2
***********************************************************************
*****
*ELEMENT,TYPE=U1,ELSET=TODOS
  1,   1,   2,  23,  22
  2,   2,   3,  24,  23
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**
**
**
*********************************************************************
*******************M A T E R I A L  P R O P E R T I E S**************
*********************************************************************
*UEL PROPERTY,ELSET=TODOS
2000.0, 0.3
***
***
***
*********************************************************************
*Surface, type=SEGMENTS, name=RigidSurface_
START,          1.,           4.
CIRCL,          0.,           3.,           0.,           4.
LINE,           0.,           4.
LINE,           1.,           4.
***
***
*Rigid Body, ref node=POINT, analytical surface=RigidSurface_
*Elset, elset=_PickedSet8,generate
  1,  20,   1
*Elset, elset=_PickedSet9, generate
   1,  381,   20
*Elset, elset=__PickedSurf7_S3,generate
 381,  400,    1
*Surface, type=NODE, name=_PickedSurf7
SUPERFICIE
*****
*********************************************************************
**********I N T E R A C T I O N  P R O P E R T I E S*****************
*********************************************************************
**
*Surface Interaction, name=IntProp-1
1.,
*Friction
0.,
*Surface Behavior, pressure-overclosure=HARD
**
** INTERACTIONS
**
** Interaction: Int-1
*Contact Pair, interaction=IntProp-1
_PickedSurf7, RigidSurface_
**
*********************************************************************
**************S T E P  D E F I N I T I O N***************************
*********************************************************************
**
*Step, name=Step-1
INICIAL
*Static
0.05, 1., 1e-05, 0.25
*******************************
***BOUNDARY CONDITIONS*********
*******************************
**
*Boundary
_PickedSet8, 2, 2
*Boundary
_PickedSet9, 1, 1
*BOUNDARY
POINTA, 6, 6, 0
POINTA, 2, 2, -1.0E-01
***
******************************
*****OUTPUT REQUESTS**********
******************************
**
*Restart, write, frequency=1
**
*EL PRINT,ELSET=TODOS
SDV1,  SDV2, SDV3, SDV4, SDV5, SDV6, SDV7, SDV8,
SDV9, SDV10,SDV11,SDV12,SDV13,SDV14,SDV15,SDV16,
SDV17, SDV18,SDV19,SDV20,SDV21,SDV22,SDV23,SDV24,
SDV25, SDV26,SDV27,SDV28,SDV29,SDV30,SDV31,SDV32
*End Step
